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1.2*140 kip + 1.6*420 kip = 840 kip
# W14x132
h := 14.7 in
b_f := 14.7 in
t_f := 1.03 in
t_w := 0.645 in
k := 1.63 in
A_g := 2*t_f*b_f + (h - 2*t_f)*t_w = 38.4348 in^2
I_x := (2*(b_f*t_f^3/12 + b_f*t_f*((h - 2*t_f)/2 + t_f/2)^2) + t_w*(h - 2*t_f)^3/12) = 1525.92 in^4
S_x := I_x/(h/2) = 207.608 in^3
Z_x := b_f*t_f*(h - t_f) + 1/4*(h - 2*t_f)^2*t_w = 232.74 in^3
r_x := sqrt(I_x/A_g) = 6.30091 in
I_y := 2*(t_f*b_f^3/12) + (h - 2*t_f)*t_w^3/12 = 545.586 in^4
S_y := I_y/(b_f/2) = 74.2294 in^3
Z_y := 1/2*b_f^2*t_f + 1/4*(h - 2*t_f)*t_w^2 = 112.601 in^3
r_y := sqrt(I_y/A_g) = 3.76764 in
c_w := (h - t_f)^2*b_f^3*t_f/24 = 25475 in^6
J := (2*b_f*t_f^3 + (h - t_f)*t_w^3)/3 = 11.9314 in^4
r_ts := sqrt(sqrt(I_y*c_w)/S_x) = 4.23763 in
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E := 29000 ksi = 199948 MPa
F_y := 50 ksi = 344.738 MPa
b_f/(2*t_f) = 7.13592
0.56*sqrt(E/F_y) = 13.4866  # Non-Slender Flange
(h - 2*k)/t_w = 17.7364
1.49*sqrt(E/F_y) = 35.884  # Non-Slender Web
L_c := 30 ft = 360 in
4.71*sqrt(E/F_y) = 113.432
L_c/r_x = 57.1346
L_c/r_y = 95.5506
F_e := π^2*E/(L_c/r_x)^2 = 87.6796 ksi
F_cr := if(L_c/r_x > 4.71*sqrt(E/F_y), 0.877*F_e, 0.658^(F_y/F_e)*F_y) = 39.3833 ksi
F_e := π^2*E/(L_c/r_y)^2 = 31.3495 ksi
F_cr := if(L_c/r_y > 4.71*sqrt(E/F_y), 0.877*F_e, 0.658^(F_y/F_e)*F_y) = 25.6481 ksi
F_e := π^2*E/max(L_c/r_x, L_c/r_y)^2 = 31.3495 ksi
F_cr := if(max(L_c/r_x, L_c/r_y) > 4.71*sqrt(E/F_y), 0.877*F_e, 0.658^(F_y/F_e)*F_y) = 25.6481 ksi
ϕ := 0.9
ϕP_n := ϕ*F_cr*A_g = 887.201 kip
1.2*140 kip + 1.6*420 kip = 840 kip
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# W14x132
h := 14.7 in
b_f := 14.7 in
t_f := 1.03 in
t_w := 0.645 in
k := 1.63 in
A_g := 2*t_f*b_f + (h - 2*t_f)*t_w = 38.4348 in^2
I_x := (2*(b_f*t_f^3/12 + b_f*t_f*((h - 2*t_f)/2 + t_f/2)^2) + t_w*(h - 2*t_f)^3/12) = 1525.92 in^4
S_x := I_x/(h/2) = 207.608 in^3
Z_x := b_f*t_f*(h - t_f) + 1/4*(h - 2*t_f)^2*t_w = 232.74 in^3
r_x := sqrt(I_x/A_g) = 6.30091 in
I_y := 2*(t_f*b_f^3/12) + (h - 2*t_f)*t_w^3/12 = 545.586 in^4
S_y := I_y/(b_f/2) = 74.2294 in^3
Z_y := 1/2*b_f^2*t_f + 1/4*(h - 2*t_f)*t_w^2 = 112.601 in^3
r_y := sqrt(I_y/A_g) = 3.76764 in
c_w := (h - t_f)^2*b_f^3*t_f/24 = 25475 in^6
J := (2*b_f*t_f^3 + (h - t_f)*t_w^3)/3 = 11.9314 in^4
r_ts := sqrt(sqrt(I_y*c_w)/S_x) = 4.23763 in
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E := 29000 ksi = 199948 MPa
F_y := 50 ksi = 344.738 MPa
b_f/(2*t_f) = 7.13592
0.56*sqrt(E/F_y) = 13.4866  # Non-Slender Flange
(h - 2*k)/t_w = 17.7364
1.49*sqrt(E/F_y) = 35.884  # Non-Slender Web
L_cx := 30 ft = 360 in
L_cy := 15 ft = 180 in
4.71*sqrt(E/F_y) = 113.432
L_cx/r_x = 57.1346
L_cy/r_y = 47.7753
F_e := π^2*E/(L_cx/r_x)^2 = 87.6796 ksi
F_cr := if(L_cx/r_x > 4.71*sqrt(E/F_y), 0.877*F_e, 0.658^(F_y/F_e)*F_y) = 39.3833 ksi
F_e := π^2*E/(L_cy/r_y)^2 = 125.398 ksi
F_cr := if(L_cy/r_y > 4.71*sqrt(E/F_y), 0.877*F_e, 0.658^(F_y/F_e)*F_y) = 42.3147 ksi
F_e := π^2*E/max(L_cx/r_x, L_cy/r_y)^2 = 87.6796 ksi
F_cr := if(max(L_cx/r_x, L_cy/r_y) > 4.71*sqrt(E/F_y), 0.877*F_e, 0.658^(F_y/F_e)*F_y) = 39.3833 ksi
ϕ := 0.9
ϕP_n := ϕ*F_cr*A_g = 1362.32 kip
1.2*140 kip + 1.6*420 kip = 840 kip
# W14x90
h := 14 in
b_f := 14.5 in
t_f := 0.71 in
t_w := 0.44 in
k := 1.31 in
A_g := 2*t_f*b_f + (h - 2*t_f)*t_w = 26.1252 in^2
I_x := (2*(b_f*t_f^3/12 + b_f*t_f*((h - 2*t_f)/2 + t_f/2)^2) + t_w*(h - 2*t_f)^3/12) = 983.036 in^4
S_x := I_x/(h/2) = 140.434 in^3
Z_x := b_f*t_f*(h - t_f) + 1/4*(h - 2*t_f)^2*t_w = 154.229 in^3
r_x := sqrt(I_x/A_g) = 6.13416 in
I_y := 2*(t_f*b_f^3/12) + (h - 2*t_f)*t_w^3/12 = 360.843 in^4
S_y := I_y/(b_f/2) = 49.7715 in^3
Z_y := 1/2*b_f^2*t_f + 1/4*(h - 2*t_f)*t_w^2 = 75.2476 in^3
r_y := sqrt(I_y/A_g) = 3.71646 in
c_w := (h - t_f)^2*b_f^3*t_f/24 = 15929.5 in^6
J := (2*b_f*t_f^3 + (h - t_f)*t_w^3)/3 = 3.83717 in^4
r_ts := sqrt(sqrt(I_y*c_w)/S_x) = 4.13185 in
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E := 29000 ksi = 199948 MPa
F_y := 50 ksi = 344.738 MPa
b_f/(2*t_f) = 10.2113
0.56*sqrt(E/F_y) = 13.4866  # Non-Slender Flange
(h - 2*k)/t_w = 25.8636
1.49*sqrt(E/F_y) = 35.884  # Non-Slender Web
L_cx := 30 ft = 360 in
L_cy := 15 ft = 180 in
4.71*sqrt(E/F_y) = 113.432
L_cx/r_x = 58.6878
L_cy/r_y = 48.4332
F_e := π^2*E/(L_cx/r_x)^2 = 83.1003 ksi
F_cr := if(L_cx/r_x > 4.71*sqrt(E/F_y), 0.877*F_e, 0.658^(F_y/F_e)*F_y) = 38.8687 ksi
F_e := π^2*E/(L_cy/r_y)^2 = 122.015 ksi
F_cr := if(L_cy/r_y > 4.71*sqrt(E/F_y), 0.877*F_e, 0.658^(F_y/F_e)*F_y) = 42.1193 ksi
F_e := π^2*E/max(L_cx/r_x, L_cy/r_y)^2 = 83.1003 ksi
F_cr := if(max(L_cx/r_x, L_cy/r_y) > 4.71*sqrt(E/F_y), 0.877*F_e, 0.658^(F_y/F_e)*F_y) = 38.8687 ksi
ϕ := 0.9
ϕP_n := ϕ*F_cr*A_g = 913.907 kip
1.2*140 kip + 1.6*420 kip = 840 kip
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