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1.2*140 kip + 1.6*420 kip = 3736.51 kN
# W14x132
h := 14.7 in = 373.38 mm
b_f := 14.7 in = 373.38 mm
t_f := 1.03 in = 26.162 mm
t_w := 0.645 in = 16.383 mm
k := 1.63 in = 41.402 mm
A_g := 2*t_f*b_f + (h - 2*t_f)*t_w = 24796.6 mm^2
I_x := (2*(b_f*t_f^3/12 + b_f*t_f*((h - 2*t_f)/2 + t_f/2)^2) + t_w*(h - 2*t_f)^3/12) = 635134048 mm^4
S_x := I_x/(h/2) = 3402079 mm^3
Z_x := b_f*t_f*(h - t_f) + 1/4*(h - 2*t_f)^2*t_w = 3813930 mm^3
r_x := sqrt(I_x/A_g) = 160.043 mm
I_y := 2*(t_f*b_f^3/12) + (h - 2*t_f)*t_w^3/12 = 227089940 mm^4
S_y := I_y/(b_f/2) = 1216401 mm^3
Z_y := 1/2*b_f^2*t_f + 1/4*(h - 2*t_f)*t_w^2 = 1845200 mm^3
r_y := sqrt(I_y/A_g) = 95.698 mm
c_w := (h - t_f)^2*b_f^3*t_f/24 = 6.84096e12 mm^6
J := (2*b_f*t_f^3 + (h - t_f)*t_w^3)/3 = 4966241 mm^4
r_ts := sqrt(sqrt(I_y*c_w)/S_x) = 107.636 mm
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E := 29000 ksi = 199948 MPa
F_y := 50 ksi = 344.738 MPa
b_f/(2*t_f) = 7.13592
0.56*sqrt(E/F_y) = 13.4866  # Non-Slender Flange
(h - 2*k)/t_w = 17.7364
1.49*sqrt(E/F_y) = 35.884  # Non-Slender Web
L_c := 30 ft = 9144 mm
4.71*sqrt(E/F_y) = 113.432
L_c/r_x = 57.1346
L_c/r_y = 95.5506
F_e := π^2*E/(L_c/r_x)^2 = 604.53 MPa
F_cr := if(L_c/r_x > 4.71*sqrt(E/F_y), 0.877*F_e, 0.658^(F_y/F_e)*F_y) = 271.538 MPa
F_e := π^2*E/(L_c/r_y)^2 = 216.147 MPa
F_cr := if(L_c/r_y > 4.71*sqrt(E/F_y), 0.877*F_e, 0.658^(F_y/F_e)*F_y) = 176.837 MPa
F_e := π^2*E/max(L_c/r_x, L_c/r_y)^2 = 216.147 MPa
F_cr := if(max(L_c/r_x, L_c/r_y) > 4.71*sqrt(E/F_y), 0.877*F_e, 0.658^(F_y/F_e)*F_y) = 176.837 MPa
ϕ := 0.9
ϕP_n := ϕ*F_cr*A_g = 3946.47 kN
1.2*140 kip + 1.6*420 kip = 3736.51 kN
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# W14x132
h := 14.7 in = 373.38 mm
b_f := 14.7 in = 373.38 mm
t_f := 1.03 in = 26.162 mm
t_w := 0.645 in = 16.383 mm
k := 1.63 in = 41.402 mm
A_g := 2*t_f*b_f + (h - 2*t_f)*t_w = 24796.6 mm^2
I_x := (2*(b_f*t_f^3/12 + b_f*t_f*((h - 2*t_f)/2 + t_f/2)^2) + t_w*(h - 2*t_f)^3/12) = 635134048 mm^4
S_x := I_x/(h/2) = 3402079 mm^3
Z_x := b_f*t_f*(h - t_f) + 1/4*(h - 2*t_f)^2*t_w = 3813930 mm^3
r_x := sqrt(I_x/A_g) = 160.043 mm
I_y := 2*(t_f*b_f^3/12) + (h - 2*t_f)*t_w^3/12 = 227089940 mm^4
S_y := I_y/(b_f/2) = 1216401 mm^3
Z_y := 1/2*b_f^2*t_f + 1/4*(h - 2*t_f)*t_w^2 = 1845200 mm^3
r_y := sqrt(I_y/A_g) = 95.698 mm
c_w := (h - t_f)^2*b_f^3*t_f/24 = 6.84096e12 mm^6
J := (2*b_f*t_f^3 + (h - t_f)*t_w^3)/3 = 4966241 mm^4
r_ts := sqrt(sqrt(I_y*c_w)/S_x) = 107.636 mm
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E := 29000 ksi = 199948 MPa
F_y := 50 ksi = 344.738 MPa
b_f/(2*t_f) = 7.13592
0.56*sqrt(E/F_y) = 13.4866  # Non-Slender Flange
(h - 2*k)/t_w = 17.7364
1.49*sqrt(E/F_y) = 35.884  # Non-Slender Web
L_cx := 30 ft = 9144 mm
L_cy := 15 ft = 4572 mm
4.71*sqrt(E/F_y) = 113.432
L_cx/r_x = 57.1346
L_cy/r_y = 47.7753
F_e := π^2*E/(L_cx/r_x)^2 = 604.53 MPa
F_cr := if(L_cx/r_x > 4.71*sqrt(E/F_y), 0.877*F_e, 0.658^(F_y/F_e)*F_y) = 271.538 MPa
F_e := π^2*E/(L_cy/r_y)^2 = 864.59 MPa
F_cr := if(L_cy/r_y > 4.71*sqrt(E/F_y), 0.877*F_e, 0.658^(F_y/F_e)*F_y) = 291.75 MPa
F_e := π^2*E/max(L_cx/r_x, L_cy/r_y)^2 = 604.53 MPa
F_cr := if(max(L_cx/r_x, L_cy/r_y) > 4.71*sqrt(E/F_y), 0.877*F_e, 0.658^(F_y/F_e)*F_y) = 271.538 MPa
ϕ := 0.9
ϕP_n := ϕ*F_cr*A_g = 6059.9 kN
1.2*140 kip + 1.6*420 kip = 3736.51 kN
# W14x90
h := 14 in = 355.6 mm
b_f := 14.5 in = 368.3 mm
t_f := 0.71 in = 18.034 mm
t_w := 0.44 in = 11.176 mm
k := 1.31 in = 33.274 mm
A_g := 2*t_f*b_f + (h - 2*t_f)*t_w = 16854.9 mm^2
I_x := (2*(b_f*t_f^3/12 + b_f*t_f*((h - 2*t_f)/2 + t_f/2)^2) + t_w*(h - 2*t_f)^3/12) = 409170438 mm^4
S_x := I_x/(h/2) = 2301296 mm^3
Z_x := b_f*t_f*(h - t_f) + 1/4*(h - 2*t_f)^2*t_w = 2527356 mm^3
r_x := sqrt(I_x/A_g) = 155.808 mm
I_y := 2*(t_f*b_f^3/12) + (h - 2*t_f)*t_w^3/12 = 150194304 mm^4
S_y := I_y/(b_f/2) = 815608 mm^3
Z_y := 1/2*b_f^2*t_f + 1/4*(h - 2*t_f)*t_w^2 = 1233088 mm^3
r_y := sqrt(I_y/A_g) = 94.3981 mm
c_w := (h - t_f)^2*b_f^3*t_f/24 = 4.27763e12 mm^6
J := (2*b_f*t_f^3 + (h - t_f)*t_w^3)/3 = 1597151 mm^4
r_ts := sqrt(sqrt(I_y*c_w)/S_x) = 104.949 mm
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E := 29000 ksi = 199948 MPa
F_y := 50 ksi = 344.738 MPa
b_f/(2*t_f) = 10.2113
0.56*sqrt(E/F_y) = 13.4866  # Non-Slender Flange
(h - 2*k)/t_w = 25.8636
1.49*sqrt(E/F_y) = 35.884  # Non-Slender Web
L_cx := 30 ft = 9144 mm
L_cy := 15 ft = 4572 mm
4.71*sqrt(E/F_y) = 113.432
L_cx/r_x = 58.6878
L_cy/r_y = 48.4332
F_e := π^2*E/(L_cx/r_x)^2 = 572.956 MPa
F_cr := if(L_cx/r_x > 4.71*sqrt(E/F_y), 0.877*F_e, 0.658^(F_y/F_e)*F_y) = 267.99 MPa
F_e := π^2*E/(L_cy/r_y)^2 = 841.261 MPa
F_cr := if(L_cy/r_y > 4.71*sqrt(E/F_y), 0.877*F_e, 0.658^(F_y/F_e)*F_y) = 290.402 MPa
F_e := π^2*E/max(L_cx/r_x, L_cy/r_y)^2 = 572.956 MPa
F_cr := if(max(L_cx/r_x, L_cy/r_y) > 4.71*sqrt(E/F_y), 0.877*F_e, 0.658^(F_y/F_e)*F_y) = 267.99 MPa
ϕ := 0.9
ϕP_n := ϕ*F_cr*A_g = 4065.26 kN
1.2*140 kip + 1.6*420 kip = 3736.51 kN
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