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# Crane Capacity | Span
m_0 := 500 kN
l_0 := 15 m
# Crane  Body Weight | Hook Appraoch
m_1 := 220.5 kN
l_1 := 1.2 m
# Crane Hoist Weight | Building Column Spacing
m_2 := 55.3 kN
w_1 := 6 m
w_2 := 9 m
# Crane Wheel Number per side | Crane Wheel Spacing
n := 2
s := 2.64 m
# Crane Girder (W36x282)
F_y := 50 ksi
E := 29000 ksi = 199948 MPa
h := 37.1 in
kL_x := 9 m
t_f := 1.57 in
b_f := 16.6 in
kL_y := 9 m
t_w := 0.885 in
k := 2.52 in
L_b := 9 m
A_g := 2*t_f*b_f + (h - 2*t_f)*t_w = 82.1786 in^2
ω_s := A_g*(77.218 kN/m^3) = 4.09397 kN/m
I_x := (2*(b_f*t_f^3/12 + b_f*t_f*((h - t_f*2)/2 + t_f/2)^2) + t_w*(h - t_f*2)^3/12) = 19349.2 in^4
S_x := I_x/(h/2) = 1043.09 in^3
Z_x := b_f*t_f*(h - t_f) + 1/4*(h - 2*t_f)^2*t_w = 1181.15 in^3
r_x := sqrt(I_x/A_g) = 15.3445 in
I_y := 2*(t_f*b_f^3/12) + (h - 2*t_f)*t_w^3/12 = 1198.9 in^4
S_y := I_y/(b_f/2) = 144.446 in^3
Z_y := 1/2*b_f^2*t_f + 1/4*(h - 2*t_f)*t_w^2 = 222.964 in^3
r_y := sqrt(I_y/A_g) = 3.81955 in
h_0 := h - t_f = 35.53 in
C_w := h_0^2*b_f^3*t_f/24 = 377749 in^6
J := (2*b_f*t_f^3 + h_0*t_w^3)/3 = 51.0361 in^4
r_ts := sqrt(sqrt(I_y*C_w)/S_x) = 4.51686 in
# Crane Wheel Load
R_A := (1.6*(m_0 + m_2)*(l_0 - l_1) + 1.2*m_1*l_0/2)/l_0 = 949.702 kN
R_A.wheel := R_A/n = 474.851 kN
# Vertical Impact Load
1.25*R_A.wheel = 593.563 kN
# Lateral Impact Load
1.6*(m_0 + m_2)*0.2/(2*n) = 44.424 kN
# Longitudinal Impact Load
0.1*R_A.wheel = 47.4851 kN
R_B := 1.6*(m_0 + m_2) + 1.2*m_1 - R_A = 203.378 kN
R_B.wheel := R_B/n = 101.689 kN
# Vertical Impact Load
1.25*R_B.wheel = 127.112 kN
# Lateral Impact Load
1.6*(m_0 + m_2)*0.2/(2*n) = 44.424 kN
# Longitudinal Impact Load
0.1*R_B.wheel = 10.1689 kN
# Crane Girder Design Force
# Vertical
R_ux := 1.25*R_A.wheel*(2 - s/max(w_1, w_2)) + 1.2*ω_s*max(w_1, w_2)/2 = 1035.12 kN
M_x1 := 1.25*R_A.wheel/(2*max(w_1, w_2))*(max(w_1, w_2) - s/2)^2 + 1.2*ω_s*max(w_1, w_2)^2/8 = 1994.73 kN*m
M_x2 := 1.25*R_A.wheel*max(w_1, w_2)/4 + 1.2*ω_s*max(w_1, w_2)^2/8 = 1385.26 kN*m
M_ux := max(M_x1, M_x2) = 1994.73 kN*m
# Lateral
R_uy := 1.6*(m_0 + m_2)*0.2/(2*n)*(2 - s/max(w_1, w_2)) = 75.817 kN
M_y1 := 1.6*(m_0 + m_2)*0.2/(2*n*2*max(w_1, w_2))*(max(w_1, w_2) - s/2)^2 = 145.569 kN*m
M_y2 := 1.6*(m_0 + m_2)*0.2/(2*n*4)*max(w_1, w_2) = 99.954 kN*m
M_uy := max(M_y1, M_y2) = 145.569 kN*m
# Longitudinal
P_r := 0.1*R_A.wheel*n = 94.9702 kN
# Axial Force on Crane Girder
ϕ := 0.9
M_rx := M_ux
M_ry := M_uy
Q_s := if(b_f/(2*t_f) ≤ 0.56*sqrt(E/F_y), 1.0, if(b_f/(2*t_f) ≤ 1.03*sqrt(E/F_y), 1.415 - 0.74*(b_f/(2*t_f))*sqrt(F_y/E), 0.69*E/(F_y*(b_f/(2*t_f))^2))) = 1
Q_a := 1.0
Q := Q_s*Q_a
F_e.y := π^2*E/(kL_y/r_y)^2 = 229.311 MPa
F_cr.y := if(4.71*sqrt(E/(Q*F_y)) ≥ kL_y/r_y, (0.658^(Q*F_y/F_e.y))*F_y, 0.877*F_e.y) = 183.745 MPa
F_e.x := π^2*E/(kL_x/r_x)^2 = 3700.87 MPa
F_cr.x := if(4.71*sqrt(E/(Q*F_y)) ≥ kL_x/r_x, (0.658^(Q*F_y/F_e.x))*F_y, 0.877*F_e.x) = 331.556 MPa
ϕP_n := ϕ*min(F_cr.y, F_cr.x)*A_g = 8767.68 kN
P_r/ϕP_n = 0.0108318
P_r = 94.9702 kN
# Flexural Moment on Crane Girder
ϕ := 0.9
L_p := 1.76*r_y*sqrt(E/F_y) = 4.11219 m
L_r := 1.95*r_ts*E/(0.7*F_y)*sqrt(J/(S_x*h_0) + sqrt((J/(S_x*h_0))^2 + 6.76*(0.7*F_y/E)^2)) = 12.8479 m
ϕM_n1 := ϕ*(F_y*Z_x - (F_y*Z_x - 0.7*F_y*S_x)*((L_b - L_p)/(L_r - L_p))) = 4722.36 kN*m
F_cr := π^2*E/(L_b/r_ts)^2*sqrt(1 + 0.078*J/(S_x*h_0)*(L_b/r_ts)^2) = 413.292 MPa
ϕM_n2 := ϕ*F_cr*S_x = 6358.01 kN*m
M_cx := if(L_b ≤ L_p, 0.9*F_y*Z_x, if(L_b ≤ L_r, ϕM_n1, ϕM_n2)) = 4722.36 kN*m
M_cy := ϕ*F_y*Z_y = 1133.62 kN*m
M_rx/M_cx = 0.422401
M_ry/M_cy = 0.12841
P_r/ϕP_n = 0.0108318
if(P_r/ϕP_n ≥ 0.2, P_r/ϕP_n + 8/9*(M_rx/M_cx + M_ry/M_cy), P_r/(2*ϕP_n) + (M_rx/M_cx + M_ry/M_cy)) = 0.556227
# Shear on Crane Girder
ϕ := 1.0
A_w := (h - 2*t_f)*t_w = 19390 mm^2
C_v := 1.0
ϕV_n.x := ϕ*0.6*F_y*A_w*C_v = 4010.69 kN
R_ux/ϕV_n.x = 0.258091
A_f := t_f*b_f*2 = 33628.3 mm^2
ϕV_n.y := ϕ*0.9*0.6*F_y*A_f*C_v = 6260.2 kN
R_uy/ϕV_n.y = 0.012111
# Factored Corbel Design Force
# Corbel Vertical Impact
1.25*R_A.wheel*(2 - s/max(w_1, w_2)) + 1.2*ω_s*max(w_1, w_2) = 1057.23 kN
# Corbel Lateral Impact
1.6*(m_0 + m_2)*0.2/(2*n)*(2 - s/max(w_1, w_2)) = 75.817 kN
# Corbel Longitudinal Impact
0.1*R_A.wheel*n = 94.9702 kN
# For Unfactored Loading
R_A := (1.0*(m_0 + m_2)*(l_0 - l_1) + 1.0*m_1*l_0/2)/l_0 = 621.126 kN
R_A.wheel := R_A/n = 310.563 kN
R_B := 1.0*(m_0 + m_2) + 1.0*m_1 - R_A = 154.674 kN
R_B.wheel := R_B/n = 77.337 kN
# Crane Girder Deflection under Unfactored Load
# Vertical
δ_wheel := 1.25*R_A.wheel/(48*E*I_x)*(max(w_1, w_2) - s)*(3*max(w_1, w_2)^2 - (max(w_1, w_2) - s)^2) = 6.46983 mm
δ_self := 5*ω_s*max(w_1, w_2)^4/(384*E*I_x) = 0.217189 mm
δ_total := δ_wheel + δ_self = 6.68702 mm
# Lateral
δ_wheel := 1.0*(m_0 + m_2)*0.2/(2*n)*1/(48*E*I_y)*(max(w_1, w_2) - s)*(3*max(w_1, w_2)^2 - (max(w_1, w_2) - s)^2) = 7.46811 mm
# Analysis Model Input - Unfactored
# Corbel Vertical Impact
1.25*R_A.wheel*(2 - s/max(w_1, w_2)) + 1.0*ω_s*max(w_1, w_2) = 699.38 kN
1.25*R_B.wheel*(2 - s/max(w_1, w_2)) + 1.0*ω_s*max(w_1, w_2) = 201.831 kN
1.25*R_A.wheel*(2 - s/max(w_1, w_2)) = 662.534 kN
1.25*R_B.wheel*(2 - s/max(w_1, w_2)) = 164.986 kN
# Corbel Lateral Impact
1.0*(m_0 + m_2)*0.2/(2*n)*(2 - s/max(w_1, w_2)) = 47.3856 kN
1.0*(m_0 + m_2)*0.2/(2*n)*(2 - s/max(w_1, w_2)) = 47.3856 kN
# Corbel Longitudinal Impact
0.1*R_A.wheel*n = 62.1126 kN
0.1*R_B.wheel*n = 15.4674 kN
# MIDAS Design Plus Crane Girder Input
V_imp := 1.25
L := (m_0 + m_2)/n*(1 - l_1/l_0) = 255.438 kN
H_imp := 0.1
D := m_1/(2*n) = 55.125 kN
L_imp := 0.1
# Flanges and Webs with Concentrated Forces
l_b := 3.25 in = 82.55 mm
# Flange Local Bending (J10.1, for tensile)
ϕ := 0.9
ϕR_n := ϕ*6.25*F_y*t_f^2*0.5 = 1541.87 kN
R_ux = 1035.12 kN
R_ux/ϕR_n = 0.671341
# Web Local Yielding (J10.2)
ϕ := 1.0
ϕR_1 := ϕ*2.5*k*F_y*t_w = 1240.05 kN
ϕR_2 := ϕ*F_y*t_w = 7749.36 kN/m
ϕR_n := ϕR_1 + l_b*ϕR_2 = 1879.76 kN
R_ux = 1035.12 kN
R_ux/ϕR_n = 0.550667
# Web Local Crippling (J10.3 for  <0.2)
l_b/h = 0.0876011
ϕ := 0.75
ϕR_3 := ϕ*0.4*t_w^2*sqrt(E*F_y*t_f/t_w) = 1676.32 kN
ϕR_4 := ϕ*0.4*t_w^2*(3/h)*(t_w/t_f)^1.5*sqrt(E*F_y*t_f/t_w) = 2258.58 kN/m
ϕR_n := ϕR_3 + l_b*ϕR_4 = 1862.76 kN
R_ux = 1035.12 kN
R_ux/ϕR_n = 0.555692
# Web Local Crippling (J10.3 for  >0.2)
l_b/h = 0.0876011
ϕR_5 := ϕ*0.4*t_w^2*(1 - 0.2*(t_w/t_f)^1.5)*sqrt(E*F_y*t_f/t_w) = 1534.43 kN
ϕR_6 := ϕ*0.4*t_w^2*(4/h)*(t_w/t_f)^1.5*sqrt(E*F_y*t_f/t_w) = 3011.44 kN/m
ϕR_n := ϕR_5 + l_b*ϕR_6 = 1783.02 kN
R_ux = 1035.12 kN
R_ux/ϕR_n = 0.580544
# Web Sidesway Buckling (J10.4)
ϕ := 0.85
L_b := 5500 mm
h/t_w/(L_b/b_f) = 3.21373
□ > 1.7
C_r := if(M_ux ≥ M_cy, 480000, 960000) ksi = 3309484 MPa
ϕR_n := ϕ*C_r*t_w^3*t_f/h^2*[1 + 0.4*(h/t_w/(L_b/b_f))] = [3279.5] kN
R_ux = 1035.12 kN
R_ux/ϕR_n = [0.315634]
# Web Compression Buckling (J10.5)
ϕ := 0.9
ϕR_n := ϕ*(24*t_w^3*sqrt(E*F_y))/h*0.5 = 1080.81 kN
R_ux = 1035.12 kN
R_ux/ϕR_n = 0.957727
